Simulations: Version=170
  DataStore
  Simulation RussetBurbank
    Weather
      ConstantsFile=C:\Users\liu283\GitRepos\Apsim_potato\weather\Indian2022_23constant.txt
      FileName=C:\Users\liu283\GitRepos\Apsim_potato\weather\Indian2022_23APSIM.csv
    Clock: Start=2022-11-10; End=2023-02-24
    Summary
    SoilArbitrator Soil Arbitrator
    Zone Field: Area=1; Slope=0; AspectAngle=0; Altitude=50
      Soil: SoilType=Sedementary; LocalName=Idar; Latitude=0; Longitude=0
        Physical
          Thickness  BD   AirDry  LL15  DUL   SAT
          100        1.2  0.08    0.11  0.25  0.5
          200        1.2  0.11    0.11  0.25  0.5
          300        1.2  0.11    0.11  0.25  0.44
          300        1.2  0.11    0.11  0.25  0.46
          300        1.2  0.11    0.11  0.25  0.44
          300        1.2  0.11    0.11  0.25  0.44
          SoilCrop PotatoSoil: LL=[0.11, 0.11, 0.11, 0.11, 0.11, 0.11]; KL=[0.1, 0.06, 0.04, 0.01, 0, 0]; XF=[1, 1, 0, 0, 0, 0]
        WaterBalance SoilWater: SummerDate=1-Nov; SummerU=9; SummerCona=4.4; WinterDate=1-Apr; WinterU=9; WinterCona=4.4; DiffusConst=88; DiffusSlope=35.4; Salb=0.18; CN2Bare=0; CNRed=-9e-05; CNCov=0; DischargeWidth=0; CatchmentArea=0; PSIDul=-100
          Thickness  SWCON  KLAT
          100        0.55   0
          200        0.55   0
          300        0.55   0
          300        0.55   0
          300        0.55   0
          300        0.55   0
        Organic: FOMCNRatio=30; CarbonUnits=Total
          Thickness  Carbon  SoilCNRatio  FBiom  FInert  FOM
          100        3.5     11.5         0.025  0.3     1243.931
          200        2.5     11.5         0.025  0.4     833.832
          300        1.2     11.5         0.015  0.75    457.617
          300        1.03    11.5         0.01   0.9     251.145
          300        0.47    11.5         0.01   0.96    137.831
          300        0.47    11.5         0.01   0.96    75.644
        Chemical: Thickness=[100, 200, 300, 300, 300, 300]; PH=[6.6, 6.2, 5.7, 5.5, 5.5, 5.5]; PHUnits=Water
        Water: Thickness=[100, 200, 300, 300, 300, 300]; InitialValues=[0.33, 0.33, 0.31, 0.27, 0.3, 0.3]; InitialPAWmm=288; RelativeTo=LL15; FilledFromTop=true
        CERESSoilTemperature Temperature
        Nutrient
        Solute NO3: Thickness=[100, 200, 300, 300, 300, 300]; InitialValues=[33.3333, 12.5, 3.88889, 3.88889, 0.383333, 0.383333]; InitialValuesUnits=ppm; WaterTableConcentration=0; D0=0; DepthConstant=0; MaxDepthSoluteAccessible=0; RunoffEffectivenessAtMovingSolute=0; MaxEffectiveRunoff=0
        Solute NH4: Thickness=[100, 200, 300, 300, 300, 300]; InitialValuesUnits=ppm; WaterTableConcentration=0; D0=0; DepthConstant=0; MaxDepthSoluteAccessible=0; RunoffEffectivenessAtMovingSolute=0; MaxEffectiveRunoff=0
          InitialValues=[0.0833333, 0.0416667, 0.0277778, 0.0277778, 0.0277778, 0.0277778]
        Solute Urea: Thickness=[100, 200, 300, 300, 300, 300]; InitialValues=[0, 0, 0, 0, 0, 0]; InitialValuesUnits=kg/ha; WaterTableConcentration=0; D0=0; DepthConstant=0; MaxDepthSoluteAccessible=0; RunoffEffectivenessAtMovingSolute=0; MaxEffectiveRunoff=0
      SurfaceOrganicMatter: InitialResidueName=Wheat; InitialResidueType=Wheat; InitialResidueMass=2000; InitialStandingFraction=0; InitialCPR=0; InitialCNR=80
      MicroClimate: a_interception=0; b_interception=1; c_interception=0; d_interception=0; SoilHeatFluxFraction=0.4; MinimumHeightDiffForNewLayer=0; NightInterceptionFraction=0.5; ReferenceHeight=2
      Irrigation
      Fertiliser
      Plant Potato
      Operations
        2022-11-20  [Fertiliser].Apply(100, Fertiliser.Types.UreaN, 0);
        2022-11-25  [Fertiliser].Apply(69, Fertiliser.Types.UreaN,0);
        2022-11-01  [Irrigation].Apply(80);
        2022-11-21  [Irrigation].Apply(16);
        2022-12-02  [Irrigation].Apply(26);
        2022-12-08  [Irrigation].Apply(3);
        2022-12-10  [Irrigation].Apply(3);
        2022-12-12  [Irrigation].Apply(5);
        2022-12-14  [Irrigation].Apply(5);
        2022-12-16  [Irrigation].Apply(5);
        2022-12-18  [Irrigation].Apply(5);
        2022-12-20  [Irrigation].Apply(5);
        2022-12-22  [Irrigation].Apply(6);
        2022-12-24  [Irrigation].Apply(6);
        2022-12-26  [Irrigation].Apply(6);
        2022-12-28  [Irrigation].Apply(6);
        2022-12-30  [Irrigation].Apply(6);
        2023-01-01  [Irrigation].Apply(10);
        2023-01-03  [Irrigation].Apply(10);
        2023-01-05  [Irrigation].Apply(10);
        2023-01-07  [Irrigation].Apply(10);
        2023-01-09  [Irrigation].Apply(10);
        2023-01-11  [Irrigation].Apply(10);
        2023-01-13  [Irrigation].Apply(8);
        2023-01-15  [Irrigation].Apply(8);
        2023-01-17  [Irrigation].Apply(8);
        2023-01-19  [Irrigation].Apply(8);
        2023-01-21  [Irrigation].Apply(6);
        2023-01-23  [Irrigation].Apply(6);
        2023-01-25  [Irrigation].Apply(6);
        2023-01-27  [Irrigation].Apply(6);
        2023-01-29  [Irrigation].Apply(6);
        2023-01-31  [Irrigation].Apply(5);
        2023-02-02  [Irrigation].Apply(5);
        2023-02-04  [Irrigation].Apply(5);
        2023-02-06  [Irrigation].Apply(4);
        2023-02-08  [Irrigation].Apply(4);
        2023-02-10  [Irrigation].Apply(19);
        2023-02-12  [Irrigation].Apply(16);
        2023-02-14  [Irrigation].Apply(16);
        2023-02-16  [Irrigation].Apply(16);
        2023-02-18  [Irrigation].Apply(16);
        2023-02-20  [Irrigation].Apply(16);
      Manager PotatoPlantAndHarvest
        PlantingDate = 11/10/2022 00:00:00
        CultivarName = RussetBurbank
        PlantSpacing = 280
        RowSpacing = 375
        PlantingDepth = 150
        StemNumberPerSeedTuber = 2.2
        SetFinalLeafNumber = 40
        HarvestDate = 02/24/2023 00:00:00
```csharp
using Models.Soils;
using Models.PMF.Struct;
using System.Linq;
using System;
using Models.Core;
using Models.PMF;
using APSIM.Shared.Utilities;
using System.Xml.Serialization;
using Newtonsoft.Json;
        
namespace Models
{
    [Serializable] 
    [System.Xml.Serialization.XmlInclude(typeof(Model))]
    public class Script : Model
    {
        [Link(ByName = true)] private Plant Potato;
        [Link] private Clock Clock;
        [Link] private Zone zone;
        [Link] private Summary Summary;
        [Link(Type = LinkType.Path, Path = "[Potato].Structure")]
        private Structure structure;
        [Description("Planting Date")]
        public DateTime PlantingDate { get; set; }
        [Description("Cultivar")]
        [Display(Type=DisplayType.CultivarName, PlantName = "Potato")]
        public string CultivarName { get; set; }
        [Description("Spacing (mm) between plants on rows")]
        public double PlantSpacing { get; set; }
        [Description("Spacing (mm) between rows")]
        public double RowSpacing { get; set; }
        [Description("Depth (mm) tubers are planted")]
        public double PlantingDepth { get; set; }
        [Description("Number of stems per seed piece")]
        public double StemNumberPerSeedTuber { get; set; }
        [Description("Final leaf number.  Leave at 0 if not known")]
        public double SetFinalLeafNumber { get; set; }
        [Description("HarvestDate Date")]
        public DateTime HarvestDate { get; set; }
        [JsonIgnore] public string FinalTag { get; set; }
        [JsonIgnore] public bool Harvested { get; set; }
        [JsonIgnore] public bool ReadyForHarvest { get; set; }
        
        [EventSubscribe("DoManagement")]
        private void OnDoManagement(object sender, EventArgs e)
        {
            double PlantPopulation = 1 / ((RowSpacing / 1000) * (PlantSpacing / 1000));

            if (Clock.Today.Date == PlantingDate)
                Potato.Sow(population: PlantPopulation, cultivar: CultivarName, depth: PlantingDepth, rowSpacing: RowSpacing, budNumber: StemNumberPerSeedTuber);
            if (Clock.Today.Date == HarvestDate && Potato.IsAlive)
            {
                Potato.Harvest();
                Potato.EndCrop();
            }
            if (SetFinalLeafNumber > 0)
                zone.Set("Potato.Structure.FinalLeafNumber.FixedValue", SetFinalLeafNumber);
            if (SetFinalLeafNumber > 46)
                throw new Exception("The model will fail with leaf numbers > 46.  Reduce Final leaf number.");
        }
    }
}
```
      Report: EventNames=[Clock].DoReport
        VariableNames:
          [Clock].Today
          [Soil].NO3.kgha
          [Soil].SoilWater.Drainage
          [Soil].SoilWater.Eo
          [Soil].SoilWater.Es
          [Soil].SoilWater.pond
          [Soil].SoilWater.Runoff
          [Soil].Water.MM
          [Potato].Arbitrator.DM.Allocated
          [Potato].Arbitrator.DM.TotalPlantDemand
          [Potato].Arbitrator.DM.NutrientLimitation
          [Potato].Arbitrator.DM.SinkLimitation
          [Potato].Arbitrator.DM.TotalFixationSupply
          [Potato].Arbitrator.N.TotalPlantDemand
          [Potato].Arbitrator.N.TotalPlantSupply
          [Potato].Arbitrator.N.Allocated
          [Potato].Leaf.AppearedCohortNo
          [Potato].Leaf.CohortParameters.MaximumNConc
          [Potato].Leaf.CohortParameters.MinimumNConc
          [Potato].Leaf.CoverDead
          [Potato].Leaf.CoverGreen
          [Potato].Leaf.CoverTotal
          [Potato].Leaf.Dead.N
          [Potato].Leaf.Dead.NConc
          [Potato].Leaf.Dead.Wt
          [Potato].Leaf.DeadCohortNo
          [Potato].Leaf.ExpandedCohortNo
          [Potato].Leaf.ExpandingCohortNo
          [Potato].Leaf.Fn
          [Potato].Leaf.Fw
          [Potato].Leaf.LAI
          [Potato].Leaf.LAIDead
          [Potato].Leaf.Live.N
          [Potato].Leaf.Live.NConc
          [Potato].Leaf.Live.Wt
          [Potato].Leaf.Photosynthesis.FT
          [Potato].Leaf.Photosynthesis.FVPD
          [Potato].Leaf.PlantAppearedGreenLeafNo
          [Potato].Leaf.SenescingCohortNo
          [Potato].Leaf.SpecificArea
          [Potato].Leaf.Transpiration
          [Potato].Leaf.PotentialEP
          [Potato].Phenology.CurrentPhase.Name
          [Potato].Phenology.Stage
          [Potato].Phenology.Stage
          [Potato].Root.Dead.N
          [Potato].Root.Dead.NConc
          [Potato].Root.Dead.Wt
          [Potato].Root.Depth
          [Potato].Root.Live.N
          [Potato].Root.Live.NConc
          [Potato].Root.Live.Wt
          [Potato].Root.MaximumNConc
          [Potato].Root.MinimumNConc
          [Potato].Root.NUptake
          [Potato].Root.WaterUptake
          [Potato].Stem.Dead.N
          [Potato].Stem.Dead.NConc
          [Potato].Stem.Dead.Wt
          [Potato].Stem.Live.N
          [Potato].Stem.Live.NConc
          [Potato].Stem.Live.StorageWt
          [Potato].Stem.Live.StructuralWt
          [Potato].Stem.Live.Wt
          [Potato].Stem.MaximumNConc
          [Potato].Stem.MinimumNConc
          [Potato].Structure.Height
          [Potato].Structure.LeafTipsAppeared
          [Potato].Structure.FinalLeafNumber
          [Potato].Structure.PlantTotalNodeNo
          [Potato].Structure.PrimaryBudTotalNodeNo
          [Potato].Structure.TotalStemPopn
          [Potato].AboveGround.N
          [Potato].AboveGround.Wt
          [Potato].BelowGround.N
          [Potato].BelowGround.Wt
          [Potato].Total.N
          [Potato].Total.Wt
          [Potato].TotalDead.N
          [Potato].TotalDead.Wt
          [Potato].TotalLive.N
          [Potato].TotalLive.Wt
          [Potato].Tuber.Dead.N
          [Potato].Tuber.Dead.NConc
          [Potato].Tuber.Dead.Wt
          [Potato].Tuber.LiveFWt.DryMatterContent
          [Potato].Tuber.Live.N
          [Potato].Tuber.Live.NConc
          [Potato].Tuber.Live.Wt
          [Potato].Tuber.LiveFWt
          [Potato].Tuber.MaximumNConc
          [Potato].Tuber.MinimumNConc
          [Potato].Leaf.InitialisedCohortNo
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